/PREP7
!*
ET,1,PLANE182
!*
KEYOPT,1,1,0
KEYOPT,1,3,1
KEYOPT,1,6,0
!*
RECTNG,1.2,0.3,0,-1.2,
SMRT,6
SMRT,OFF
/UI,MESH,OFF
FLST,2,1,5,ORDE,1
FITEM,2,1
CM,_Y,AREA
ASEL, , , ,       1
CM,_Y1,AREA
CHKMSH,'AREA'
CMSEL,S,_Y
!*
