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/BATCH
/COM,ANSYS RELEASE 2023 R2           BUILD 23.2      UP20230531       22:40:16
RESUME,'EyeBoltFirst','db','Desktop/Senior Year/Fall Semester/ComputationalStructuralAnalysis_4502/Final Project'
/COM,ANSYS RELEASE 2023 R2           BUILD 23.2      UP20230531       22:40:16
LPLOT
APLOT
/PREP7
NUMMRG,ALL, ,0.005, ,LOW
VPLOT
VDELE,       1
LPLOT
FLST,2,35,5,ORDE,4
FITEM,2,2
FITEM,2,-26
FITEM,2,28
FITEM,2,-37
VA,P51X
SAVE
SAVE
MSHKEY,0
MSHAPE,1,3d
ET,1,SOLID187
KEYOPT,1,6,0
MPTEMP,,,,,,,,
MPTEMP,1,0
MPDATA,EX,1,,3e7
MPDATA,PRXY,1,,0.3
MSHKEY,0
MSHAPE,1,3d
CM,_Y,VOLU
VSEL, , , ,       1
CM,_Y1,VOLU
CHKMSH,'VOLU'
CMSEL,S,_Y
VMESH,_Y1
CMDELE,_Y
CMDELE,_Y1
CMDELE,_Y2
FLST,2,1,5,ORDE,1
FITEM,2,24
/GO
DA,P51X,ALL,0
APLOT
SAVE
FLST,2,4,5,ORDE,4
FITEM,2,11
FITEM,2,-12
FITEM,2,32
FITEM,2,-33
/GO
SAVE
SAVE
FLST,2,4,5,ORDE,4
FITEM,2,11
FITEM,2,-12
FITEM,2,32
FITEM,2,-33
/GO
SFA,P51X,1,PRES,3000
FINISH
/SOL
/STATUS,SOLU
SOLVE
FINISH
/POST1
SET,FIRST
PLDISP,0
PLESOL, S,Y, 0,1.0
/EFACET,1
PLNSOL, U,SUM, 0,1.0
PLESOL, S,X, 0,1.0
PLESOL, S,Y, 0,1.0
SAVE
SAVE
FINISH
! /EXIT,ALL
/BATCH
/COM,ANSYS RELEASE 2023 R2           BUILD 23.2      UP20230531       20:53:12
RESUME,'EyeBoltFirst','db','Desktop/Senior Year/Fall Semester/ComputationalStructuralAnalysis_4502/Final Project'
/COM,ANSYS RELEASE 2023 R2           BUILD 23.2      UP20230531       20:53:12
/SOLU
/PSF,PRES,NORM,1,0,1
/PBF,DEFA, ,1
/PSYMB,CS,0
/PSYMB,NDIR,0
/PSYMB,ESYS,0
/PSYMB,LDIV,0
/PSYMB,LDIR,0
/PSYMB,ADIR,0
/PSYMB,ECON,0
/PSYMB,XNODE,0
/PSYMB,DOT,1
/PSYMB,PCONV,
/PSYMB,LAYR,0
/PSYMB,FBCS,0
/PBC,ALL, ,1
FINISH
/POST1
FINISH
/PREP7
RESUME,'EyeBoltFirst','db','.'
/COM,ANSYS RELEASE 2023 R2           BUILD 23.2      UP20230531       20:54:13
FINISH
/SOL
FINISH
/POST1
PLESOL, S,Y, 0,1.0
FINISH
/SOLU
LPLOT
FINISH
/PREP7
FLST,2,4,5,ORDE,4
FITEM,2,11
FITEM,2,-12
FITEM,2,32
FITEM,2,-33
SFADELE,P51X,1,PRES
FLST,2,2,4,ORDE,2
FITEM,2,60
FITEM,2,-61
/GO
SFL,P51X,PRES,3000,
FLST,2,2,4,ORDE,2
FITEM,2,60
FITEM,2,-61
/GO
SFL,P51X,PRES,3000,
FLST,2,2,4,ORDE,2
FITEM,2,60
FITEM,2,-61
SFLDELE,P51X,PRES
FLST,2,2,4,ORDE,2
FITEM,2,60
FITEM,2,-61
/GO
SFL,P51X,PRES,3000,
FINISH
/SOL
/STATUS,SOLU
SOLVE
FINISH
/POST26
FILE,'EyeBoltFirst','rst','.'
NUMVAR,200
SOLU,191,NCMIT
STORE,MERGE
FILLDATA,191,,,,1,1
REALVAR,191,191
FINISH
/POST1
SET,FIRST
PLESOL, S,Y, 0,1.0
/EFACET,1
PLNSOL, U,SUM, 0,1.0
LPLOT
FINISH
/SOL
FINISH
/PREP7
FLST,2,2,4,ORDE,2
FITEM,2,60
FITEM,2,-61
SFLDELE,P51X,PRES
FLST,2,2,4,ORDE,2
FITEM,2,60
FITEM,2,-61
/GO
/LIG,   1,1, 1.000,   0.00000000000    ,   0.00000000000    ,   0.00000000000    ,   0.00000000000
/LIG,   1,1, 1.000,   0.00000000000    ,   0.00000000000    ,   0.00000000000    ,   0.00000000000
/LIG,   1,1, 1.000,   0.00000000000    ,   0.00000000000    ,   0.00000000000    ,   0.00000000000
/LIG,   1,1, 1.000,   0.00000000000    ,   0.00000000000    ,   0.00000000000    ,   0.00000000000
/LIG,   1,1, 1.000,   0.00000000000    ,   0.00000000000    ,   0.00000000000    ,   0.00000000000
RESUME,'EyeBoltFirst','db','.'
/COM,ANSYS RELEASE 2023 R2           BUILD 23.2      UP20230531       21:31:11
/PSF,PRES,NORM,2,0,1
/PBF,DEFA, ,1
/PSYMB,CS,0
/PSYMB,NDIR,0
/PSYMB,ESYS,0
/PSYMB,LDIV,0
/PSYMB,LDIR,0
/PSYMB,ADIR,0
/PSYMB,ECON,0
/PSYMB,XNODE,0
/PSYMB,DOT,1
/PSYMB,PCONV,
/PSYMB,LAYR,0
/PSYMB,FBCS,0
/PBC,ALL, ,1
LPLOT
APLOT
FLST,2,4,5,ORDE,4
FITEM,2,11
FITEM,2,-12
FITEM,2,32
FITEM,2,-33
SFADELE,P51X,1,PRES
FLST,2,2,4,ORDE,2
FITEM,2,60
FITEM,2,-61
/GO
SFL,P51X,PRES,3000,
FLST,2,2,4,ORDE,2
FITEM,2,60
FITEM,2,-61
SFLDELE,P51X,PRES
FLST,2,1,3,ORDE,1
FITEM,2,53
/GO
FK,P51X,FY,3000
FINISH
/SOL
/STATUS,SOLU
SOLVE
FINISH
/POST1
SET,FIRST
/EFACET,1
PLNSOL, U,SUM, 0,1.0
PLESOL, S,Y, 0,1.0
LPLOT
FINISH
/SOL
FLST,2,1,3,ORDE,1
FITEM,2,53
FKDELE,P51X,ALL
FLST,2,2,4,ORDE,2
FITEM,2,60
FITEM,2,-61
/GO
FLST,2,4,5,ORDE,4
FITEM,2,11
FITEM,2,-12
FITEM,2,32
FITEM,2,-33
/GO
SFA,P51X, ,PRES,2061
FINISH
/POST1
FINISH
/SOL
/STATUS,SOLU
SOLVE
FINISH
/POST1
SET,FIRST
PLESOL, S,Y, 0,1.0
FINISH
/SOL
FLST,2,4,5,ORDE,4
FITEM,2,11
FITEM,2,-12
FITEM,2,32
FITEM,2,-33
SFADELE,P51X,1,PRES
FLST,2,4,5,ORDE,4
FITEM,2,11
FITEM,2,-12
FITEM,2,32
FITEM,2,-33
/GO
SFA,P51X, ,PRES,250
/STATUS,SOLU
SOLVE
FINISH
/POST1
SET,FIRST
PLESOL, S,Y, 0,1.0
SAVE
FINISH
/SOL
FINISH
/PREP7
LPLOT
SAVE
FINISH
/FILNAME,2D_EyeBolt,1
/BATCH
/COM,ANSYS RELEASE 2023 R2           BUILD 23.2      UP20230531       23:03:01
RESUME,'EyeBoltFirst','db','.'
/COM,ANSYS RELEASE 2023 R2           BUILD 23.2      UP20230531       23:03:01
LPLOT
/PSF,PRES,NORM,1,0,1
/PBF,DEFA, ,1
/PSYMB,CS,0
/PSYMB,NDIR,0
/PSYMB,ESYS,0
/PSYMB,LDIV,0
/PSYMB,LDIR,0
/PSYMB,ADIR,0
/PSYMB,ECON,0
/PSYMB,XNODE,0
/PSYMB,DOT,1
/PSYMB,PCONV,
/PSYMB,LAYR,0
/PSYMB,FBCS,0
/PBC,ALL, ,1
/POST1
PLESOL, EPEL,Y, 0,1.0
PLESOL, EPEL,1, 0,1.0
PLESOL, EPEL,2, 0,1.0
/EFACET,1
PLNSOL, U,SUM, 0,1.0
PLESOL, S,Y, 0,1.0
PLESOL, S,X, 0,1.0
PLESOL, S,3, 0,1.0
PLESOL, S,XY, 0,1.0
PLESOL, S,YZ, 0,1.0
PLESOL, S,XZ, 0,1.0
PLESOL, S,X, 0,1.0
PLESOL, S,Y, 0,1.0
FINISH
/BATCH
/COM,ANSYS RELEASE 2023 R2           BUILD 23.2      UP20230531       01:55:29
RESUME,'EyeBoltFirst','db','.'
/COM,ANSYS RELEASE 2023 R2           BUILD 23.2      UP20230531       01:55:30
/PSF,PRES,NORM,3,0,1
/PBF,DEFA, ,1
/PSYMB,CS,0
/PSYMB,NDIR,0
/PSYMB,ESYS,0
/PSYMB,LDIV,0
/PSYMB,LDIR,0
/PSYMB,ADIR,0
/PSYMB,ECON,0
/PSYMB,XNODE,0
/PSYMB,DOT,1
/PSYMB,PCONV,
/PSYMB,LAYR,0
/PSYMB,FBCS,0
/PBC,ALL, ,1
/SOLU
/STATUS,SOLU
SOLVE
FINISH
/POST1
SET,FIRST
PLDISP,0
/PSF,DEFA, ,1,0,1
/PBF,DEFA, ,1
/PSYMB,CS,0
/PSYMB,NDIR,0
/PSYMB,ESYS,0
/PSYMB,LDIV,0
/PSYMB,LDIR,0
/PSYMB,ADIR,0
/PSYMB,ECON,0
/PSYMB,XNODE,0
/PSYMB,DOT,1
/PSYMB,PCONV,
/PSYMB,LAYR,0
/PSYMB,FBCS,0
/PBC,ALL, ,1
/PSF,PRES,NORM,3,0,1
/PBF,DEFA, ,1
/PSYMB,CS,0
/PSYMB,NDIR,0
/PSYMB,ESYS,0
/PSYMB,LDIV,0
/PSYMB,LDIR,0
/PSYMB,ADIR,0
/PSYMB,ECON,0
/PSYMB,XNODE,0
/PSYMB,DOT,1
/PSYMB,PCONV,
/PSYMB,LAYR,0
/PSYMB,FBCS,0
/PBC,ALL, ,1
/EFACET,1
PLNSOL, U,SUM, 0,1.0
/PSF,PRES,NORM,3,0,1
/PBF,DEFA, ,1
/PSYMB,CS,0
/PSYMB,NDIR,0
/PSYMB,ESYS,0
/PSYMB,LDIV,0
/PSYMB,LDIR,0
/PSYMB,ADIR,0
/PSYMB,ECON,0
/PSYMB,XNODE,0
/PSYMB,DOT,1
/PSYMB,PCONV,
/PSYMB,LAYR,0
/PSYMB,FBCS,0
/PBC,ALL, ,0
PLESOL, S,X, 0,1.0
PLESOL, S,Y, 0,1.0
PLESOL, EPEL,X, 0,1.0
PLESOL, EPEL,Y, 0,1.0
FINISH
/PREP7
LPLOT
FLST,2,4,5,ORDE,4
FITEM,2,11
FITEM,2,-12
FITEM,2,32
FITEM,2,-33
SFADELE,P51X,1,PRES
FLST,2,4,5,ORDE,4
FITEM,2,12
FITEM,2,-13
FITEM,2,31
FITEM,2,-32
/GO
SFA,P51X,1,PRES,250
FINISH
/SOL
/STATUS,SOLU
SOLVE
FINISH
/POST1
SET,FIRST
PLDISP,0
/EFACET,1
PLNSOL, U,SUM, 0,1.0
PLESOL, S,X, 0,1.0
PLESOL, S,Y, 0,1.0
PLESOL, EPEL,X, 0,1.0
PLESOL, EPEL,Y, 0,1.0
LPLOT
FINISH
/SOL
/PSF,PRES,NORM,1,0,1
/PBF,DEFA, ,1
/PSYMB,CS,0
/PSYMB,NDIR,0
/PSYMB,ESYS,0
/PSYMB,LDIV,0
/PSYMB,LDIR,0
/PSYMB,ADIR,0
/PSYMB,ECON,0
/PSYMB,XNODE,0
/PSYMB,DOT,1
/PSYMB,PCONV,
/PSYMB,LAYR,0
/PSYMB,FBCS,0
/PBC,ALL, ,0
FLST,2,4,5,ORDE,4
FITEM,2,12
FITEM,2,-13
FITEM,2,31
FITEM,2,-32
SFADELE,P51X,1,PRES
FLST,2,4,5,ORDE,4
FITEM,2,13
FITEM,2,-14
FITEM,2,29
FITEM,2,31
/GO
SFA,P51X,1,PRES,250
/STATUS,SOLU
SOLVE
FINISH
/POST1
SET,FIRST
PLDISP,0
/EFACET,1
PLNSOL, U,SUM, 0,1.0
PLESOL, S,X, 0,1.0
PLESOL, S,Y, 0,1.0
PLESOL, EPEL,X, 0,1.0
PLESOL, EPEL,Y, 0,1.0
FINISH
/SOL
LPLOT
/PSF,PRES,NORM,1,0,1
/PBF,DEFA, ,1
/PSYMB,CS,0
/PSYMB,NDIR,0
/PSYMB,ESYS,0
/PSYMB,LDIV,0
/PSYMB,LDIR,0
/PSYMB,ADIR,0
/PSYMB,ECON,0
/PSYMB,XNODE,0
/PSYMB,DOT,1
/PSYMB,PCONV,
/PSYMB,LAYR,0
/PSYMB,FBCS,0
/PBC,ALL, ,0
FLST,2,4,5,ORDE,4
FITEM,2,13
FITEM,2,-14
FITEM,2,29
FITEM,2,31
SFADELE,P51X,1,PRES
FLST,2,4,5,ORDE,4
FITEM,2,14
FITEM,2,-15
FITEM,2,28
FITEM,2,-29
/GO
SFA,P51X,1,PRES,250
/STATUS,SOLU
SOLVE
FINISH
/POST1
PLDISP,0
/EFACET,1
PLNSOL, U,SUM, 0,1.0
PLESOL, S,X, 0,1.0
PLESOL, S,Y, 0,1.0
PLESOL, EPEL,X, 0,1.0
PLESOL, S,Y, 0,1.0
PLESOL, EPEL,X, 0,1.0
PLESOL, EPEL,Y, 0,1.0
FINISH
! /EXIT,NOSAV
